ORIGIN ≡ 1
K(A, B) :=
    n ← rows(A)
    m ← cols(A)
    u ← rows(B)
    v ← cols(B)
    if m == u
        for i ∈ 1 .. n
            for j ∈ 1 .. m
                for a ∈ 1 .. u
                    for b ∈ 1 .. v
                        C[i, b] ← A[i, j]*B[a, b]
        C
    0 otherwise
A := [2, 1; 3, 2; 4, 1]
B := [6; 5]
K(A, B) = [5; 10; 5]
