ORIGIN ≡ 1
S(n) :=
    for i ∈ 1 .. n
        for j ∈ 1 .. n
            k ← min(i - 1, j - 1, n - i, n - j)
            m ← n - 2*k
            p ← 4*k*(n - k)
            A[i, j] ← p + j - k if i == 1 + k
            otherwise
                A[i, j] ← p + m - 1 + i - k if j == n - k
                otherwise
                    A[i, j] ← p + 2*m - 2 + (n - k) - j if i == n - k
                    A[i, j] ← p + 3*m - 3 + (n - k) - i otherwise
    A
S(4) = [1, 2, 3, 4; 11, 13, 14, 5; 10, 15, 15, 6; 9, 8, 7, 7]
